// COMSOL Multiphysics 6.0.0.318 model "pin_yu_fen_xi.mph"
// Outline of the model tree

Parameters
  wave_length = 2*pi/k
  L = 15e-3
  W = 1e-3
  A1 = 0.0716103855121347 - 0.351117170513489i
  A2 = -0.0716103855121344 + 0.351117170513489i
  A3 = -0.597285074745805 - 0.121816356632858i
  A4 = -0.597285074745805 - 0.121816356632858i
  k = 2711.79311545120
  p = 0.00000000000000 + 2513.75232668683i
  q = 0.00000000000000 + 1803.92352189990i
  ul1 = A1*1i*k
  ul2 = A2*1i*k
  ul3 = A3*i*(-q)
  ul4 = A4*i*(q)
  vl1 = A1*1i*p
  vl2 = A2*1i*p
  vl3 = A3*1i*k
  vl4 = A4*1i*k
  har = exp(1i*k*L)

Geometry
  geom1 "几何 1" (2D, length unit m)
    r1: Rectangle "矩形 1" | pos = {L/2, 0}; base = center; size = {L, W}
    fin: Finalize "形成联合体"

Materials
  mat1: Common "Aluminum" on all domains
    def "Basic"
      relpermeability = 1
      heatcapacity = 900[J/(kg*K)]
      thermalconductivity = 238[W/(m*K)]
      electricconductivity = 3.774e7[S/m]
      relpermittivity = 1
      thermalexpansioncoefficient = 23e-6[1/K]
      density = 2700[kg/m^3]
    Enu "Young's modulus and Poisson's ratio"
      E = 70e9[Pa]
      nu = 0.33
    Murnaghan
      l = -2.5e11[Pa]
      m = -3.3e11[Pa]
      n = -3.5e11[Pa]
    Lame "Lamé parameters"
      lambLame = 5.1e10[Pa]
      muLame = 2.6e10[Pa]

Physics
  solid: SolidMechanics "固体力学" on all domains
    dependent variable u = {u, v, w}
    lemm1: LinearElasticModel "线弹性材料 1" (default)
    free1: Free "自由 1" (default)
    init1: init "初始值 1" (default)
    disp1: Displacement1 "指定位移 1" on boundaries 1
      Notation = StandardNotation
      Direction = {1, 1, 0}
      U0 = {ul1*exp(1i*p*y)+ul2*exp(-1i*p*y)+ul3*exp(1i*q*y)+ul4*exp(-1i*q*y), vl1*exp(1i*p*y)+vl2*exp(-1i*p*y)+vl3*exp(1i*q*y)+vl4*exp(-1i*q*y), 0}
      coordinateSystem = GlobalSystem
    disp2: Displacement1 "指定位移 2" on boundaries 4
      Notation = StandardNotation
      Direction = {1, 1, 0}
      U0 = {(ul1*exp(1i*p*y)+ul2*exp(-1i*p*y)+ul3*exp(1i*q*y)+ul4*exp(-1i*q*y))*har, (vl1*exp(1i*p*y)+vl2*exp(-1i*p*y)+vl3*exp(1i*q*y)+vl4*exp(-1i*q*y))*har, 0}
      coordinateSystem = GlobalSystem

Mesh
  mesh1 "网格 1"
    size: MeshSizeDefault "大小" | hmax = 0.00101; hmin = 4.5E-6; hcurve = 0.3; hgrad = 1.3
    map1: Map "映射 1" on remaining entities
      dis1: Distribution "分布 1" on boundaries 1 | numelem = 10
      dis2: Distribution "分布 2" on boundaries 2 | numelem = 100

Studies
  std1 "研究 1"
    freq: Frequency "频域" | plist = 1e6

Solver configurations
  sol1 "解 1" (study std1)
    v1: Variables "因变量 1"
    s1: Stationary "稳态求解器 1"
      dDef: Direct "直接"
      p1: Parametric "参数化 1" | pname = freq; plistarr = 1e6; punit = Hz; pcontinuationmode = no
      fc1: FullyCoupled "全耦合 1" | linsolver = dDef

Datasets
  dset1: Solution | solution = sol1
  cln1: CutLine2D "二维截线 1" | data = dset1; genpoints = {{0.00749999, -5.0E-4}, {0.00749999, 5.0E-4}}

Plots
  pg1: PlotGroup2D "应力 (solid)" | data = dset1
    surf1: Surface "表面 1" | expr = solid.mises_peak
      def: Deform "变形" | expr = {u, v}; descr = 位移场
  pg2: PlotGroup1D "u" | data = dset1
    lngr1: LineGraph "线结果图 1" on boundaries 3 | data = dset1; expr = -u; title = 上表面位移u
  pg3: PlotGroup1D "v" | data = dset1; title = 上表面位移v
    lngr1: LineGraph "线结果图 1" on boundaries 3 | data = dset1; expr = v; descr = 位移场，Y 分量